*Heading
** Job name: Job-Shell Model name: Streifenziehversuch
** Generated by: Abaqus/CAE 6.14-6
*Preprint, echo=NO, model=NO, history=NO, contact=NO
**
** PARTS
**
*Part, name=Blech_Shell
*Node
      1,           0.,           0.,           0.
      2,           2.,           0.,           0.
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*Element, type=S4R
   1,    1,    2,  103,  102
   2,    2,    3,  104,  103
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*Nset, nset=_PickedSet5, internal, generate
    1,  1111,     1
*Elset, elset=_PickedSet5, internal, generate
    1,  1000,     1
*Elset, elset=_Blech_oben_SPOS, internal, generate
    1,  1000,     1
*Surface, type=ELEMENT, name=Blech_oben
_Blech_oben_SPOS, SPOS
*Elset, elset=_Blech_unten_SNEG, internal, generate
    1,  1000,     1
*Surface, type=ELEMENT, name=Blech_unten
_Blech_unten_SNEG, SNEG
** Section: Section-Blech
*Shell Section, elset=_PickedSet5, material=X5CRNI18-1_4301
0.4, 5
*End Part
**
*Part, name=Niederhalterplatte
*Node
      1,           5.,           0.,          30.
      2,         3.75,         1.25,          30.
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*Element, type=C3D8R
   1,   81,   82,   87,   86,    1,    2,    7,    6
   2,   82,   83,   88,   87,    2,    3,    8,    7
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*Node
   1441,          40.,           5.,          15.
*Nset, nset=Niederhalterplatte-RefPt_, internal
1441,
*Nset, nset=_PickedSet3, internal, generate
    1,  1440,     1
*Elset, elset=_PickedSet3, internal, generate
    1,  1020,     1
** Section: Section-NH
*Solid Section, elset=_PickedSet3, material=Stahl
,
*End Part
**
**
** ASSEMBLY
**
*Assembly, name=Assembly
**
*Instance, name=Niederhalterplatte-1, part=Niederhalterplatte
        165.,           0.,          25.
        165.,           0.,          25.,         166.,           0.,          25.,         180.
*End Instance
**
*Instance, name=Niederhalterplatte-2, part=Niederhalterplatte
        165.,          0.6,          -5.
*End Instance
**
*Instance, name=Blech_Shell-1, part=Blech_Shell
          0.,           0.,          20.
          0.,           0.,          20.,          -1.,           0.,          20.,          90.
*End Instance
**
*Nset, nset=Blech-Set, instance=Blech_Shell-1, generate
    1,  1111,     1
*Nset, nset=Set-3, instance=Blech_Shell-1, generate
  202,  1010,   101
*Nset, nset=_PickedSet10, internal, instance=Niederhalterplatte-2
 1441,
*Nset, nset=_PickedSet11, internal, instance=Niederhalterplatte-2, generate
    1,  1440,     1
*Elset, elset=_PickedSet11, internal, instance=Niederhalterplatte-2, generate
    1,  1020,     1
*Nset, nset=_PickedSet12, internal, instance=Niederhalterplatte-1
 1441,
*Nset, nset=_PickedSet13, internal, instance=Niederhalterplatte-1, generate
    1,  1440,     1
*Elset, elset=_PickedSet13, internal, instance=Niederhalterplatte-1, generate
    1,  1020,     1
*Nset, nset=_PickedSet15, internal, instance=Niederhalterplatte-1
 1441,
*Nset, nset=_PickedSet16, internal, instance=Niederhalterplatte-2
 1441,
*Nset, nset=_PickedSet28, internal, instance=Blech_Shell-1
    1,    2,    3,    4,    5,    6
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*Elset, elset=_PickedSet28, internal, instance=Blech_Shell-1
    1,    2,    3,    4,    5,    6
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*Elset, elset=_NH-oben_S6, internal, instance=Niederhalterplatte-2, generate
    1,  1017,     4
*Surface, type=ELEMENT, name=NH-oben
_NH-oben_S6, S6
*Elset, elset=_NH-unten_S6, internal, instance=Niederhalterplatte-1, generate
    1,  1017,     4
*Surface, type=ELEMENT, name=NH-unten
_NH-unten_S6, S6
*Elset, elset=__PickedSurf14_S4, internal, instance=Niederhalterplatte-2, generate
    4,  1020,     4
*Surface, type=ELEMENT, name=_PickedSurf14, internal
__PickedSurf14_S4, S4
** Constraint: RigidBody-1
*Rigid Body, ref node=_PickedSet10, elset=_PickedSet11
** Constraint: RigidBody-2
*Rigid Body, ref node=_PickedSet12, elset=_PickedSet13
*End Assembly
*Amplitude, name=SmoothStep, definition=SMOOTH STEP
             0.,              0.,              1.,              1.
**
** MATERIALS
**
*Material, name=Stahl
*Density
 7.9e-09,
*Elastic
210000., 0.3
*Material, name=X5CRNI18-1_4301
*Conductivity
 13.79,
*Density
 7.9e-09,
*Elastic
200000., 0.3
*Expansion
 1.65e-05,
*Inelastic Heat Fraction
         0.9,
*Plastic
 311.,   0.
 362., 0.02
 408., 0.04
 451., 0.06
 491., 0.08
 528.,  0.1
 564., 0.12
 598., 0.14
 631., 0.16
 662., 0.18
 693.,  0.2
 832.,  0.3
 956.,  0.4
1070.,  0.5
1320., 0.75
1540.,   1.
*Specific Heat
 4.9331e+08,
**
** INTERACTION PROPERTIES
**
*Surface Interaction, name=IntProp
*Friction, user=friction, depvar=0, properties=6
8,0.0623,-0.1542,-0.1192,0.1017,-0.0844
*Surface Behavior, pressure-overclosure=HARD
*Surface Interaction, name=IntProp-2
*Friction, user=friction, depvar=0, properties=6
8,0.0623,-0.1542,-0.1192,0.1017,-0.0844
*Surface Behavior, pressure-overclosure=HARD
**
** INTERACTIONS
**
** Interaction: general_contact
*Contact, op=NEW
*Contact Inclusions
Blech_Shell-1.Blech_oben , NH-oben
Blech_Shell-1.Blech_unten , NH-unten
*Contact Property Assignment
 ,  , IntProp
*Contact Formulation, type=PURE MASTER-SLAVE
NH-oben , Blech_Shell-1.Blech_unten , MASTER
NH-unten , Blech_Shell-1.Blech_oben , MASTER
** ----------------------------------------------------------------
**
** STEP: Step-1
**
*Step, name=Step-1, nlgeom=YES
*Dynamic, Explicit
, 0.4471
*Bulk Viscosity
0.06, 1.2
*FIELD, USER, NUMBER=8
Blech-Set
** Mass Scaling: Semi-Automatic
**               Whole Model
*Fixed Mass Scaling, factor=4.
**
** BOUNDARY CONDITIONS
**
** Name: BC-1 Type: Symmetry/Antisymmetry/Encastre
*Boundary
_PickedSet15, ENCASTRE
** Name: BC-2 Type: Displacement/Rotation
*Boundary
_PickedSet16, 1, 1
_PickedSet16, 3, 3
_PickedSet16, 4, 4
_PickedSet16, 5, 5
_PickedSet16, 6, 6
** Name: BC-3 Type: Displacement/Rotation
*Boundary, amplitude=SmoothStep
Set-3, 1, 1, 500.
Set-3, 2, 2
Set-3, 3, 3
Set-3, 4, 4
Set-3, 5, 5
Set-3, 6, 6
** Name: BC-4 Type: Displacement/Rotation
*Boundary
_PickedSet28, 6, 6
**
** LOADS
**
** Name: Surfforce   Type: Pressure
*Dsload
_PickedSurf14, P, 3.
**
** INTERACTIONS
**
** Interaction: general_contact
*Contact, op=NEW
** Interaction: general_contact_Zug
*Contact, op=NEW
*Contact Inclusions, ALL EXTERIOR
*Contact Property Assignment
 ,  , IntProp
Blech_Shell-1.Blech_oben , NH-oben , IntProp
Blech_Shell-1.Blech_unten , NH-unten , IntProp-2
*Contact Formulation, type=PURE MASTER-SLAVE
NH-oben , Blech_Shell-1.Blech_oben , MASTER
NH-unten , Blech_Shell-1.Blech_unten , MASTER
Blech_Shell-1.Blech_oben , NH-oben , SLAVE
Blech_Shell-1.Blech_unten , NH-unten , SLAVE
**
** OUTPUT REQUESTS
**
*Restart, write, number interval=1, time marks=NO
**
** FIELD OUTPUT: F-Output-1
**
*Output, field, number interval=100
*Node Output
A, RF, U, V
**
** FIELD OUTPUT: F-Output-2
**
*Contact Output
CFORCE, CSTRESS, FSLIP, FSLIPR
**
** FIELD OUTPUT: F-Output-3
**
*Element Output, directions=YES
FV, LE, P, PE, PEEQ, PEEQVAVG, PEVAVG, S, SDV, STH, SVAVG
**
** HISTORY OUTPUT: H-Output-1
**
*Output, history, variable=PRESELECT
*End Step
