*Heading
** Job name: Job-1 Model name: Streifenziehversuch
** Generated by: Abaqus/CAE 6.14-1
*Preprint, echo=NO, model=NO, history=NO, contact=NO
**
** PARTS
**
*Part, name=Blech
*Node
      1,         200.,          20.,  0.400000006
      2,         200.,          18.,  0.400000006
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*Element, type=C3D8R
   1,   23,   24,   35,   34,    1,    2,   13,   12
   2,   24,   25,   36,   35,    2,    3,   14,   13
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*Nset, nset=_PickedSet5, internal, generate
    1,  2222,     1
*Elset, elset=_PickedSet5, internal, generate
    1,  1000,     1
*Elset, elset=_Blech_oben_S5, internal, generate
    1,  1000,     1
*Surface, type=ELEMENT, name=Blech_oben
_Blech_oben_S5, S5
*Elset, elset=_Blech_unten_S3, internal, generate
    1,  1000,     1
*Surface, type=ELEMENT, name=Blech_unten
_Blech_unten_S3, S3
** Section: Section-1_Blech
*Solid Section, elset=_PickedSet5, material=X5CRNI18-1_4301
,
*End Part
**
*Part, name=Niederhalterplatte
*Node
      1,           5.,           0.,          30.
      2,         3.75,         1.25,          30.
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*Element, type=C3D8R
   1,   81,   82,   87,   86,    1,    2,    7,    6
   2,   82,   83,   88,   87,    2,    3,    8,    7
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*Node
   1441,          40.,           5.,          15.
*Nset, nset=Niederhalterplatte-RefPt_, internal
1441,
*Nset, nset=_PickedSet3, internal, generate
    1,  1440,     1
*Elset, elset=_PickedSet3, internal, generate
    1,  1020,     1
** Section: Section-NH
*Solid Section, elset=_PickedSet3, material=Stahl
,
*End Part
**
**
** ASSEMBLY
**
*Assembly, name=Assembly
**
*Instance, name=Blech-1, part=Blech
          0.,           0.,           0.
          0.,           0.,           0.,           1.,           0.,           0.,          90.
*End Instance
**
*Instance, name=Niederhalterplatte-1, part=Niederhalterplatte
        165.,         -0.4,          25.
        165.,         -0.4,          25.,         166.,         -0.4,          25.,         180.
*End Instance
**
*Instance, name=Niederhalterplatte-2, part=Niederhalterplatte
        165.,           0.,          -5.
*End Instance
**
*Nset, nset=NH1_Set, instance=Niederhalterplatte-1, generate
    1,  1440,     1
*Nset, nset=Set-Blech, instance=Blech-1, generate
    1,  2222,     1
*Nset, nset=Set-Blech-1, instance=Blech-1, generate
  1,  22,   1
*Nset, nset=_PickedSet10, internal, instance=Niederhalterplatte-2
 1441,
*Nset, nset=_PickedSet11, internal, instance=Niederhalterplatte-2, generate
    1,  1440,     1
*Elset, elset=_PickedSet11, internal, instance=Niederhalterplatte-2, generate
    1,  1020,     1
*Nset, nset=_PickedSet12, internal, instance=Niederhalterplatte-1
 1441,
*Nset, nset=_PickedSet13, internal, instance=Niederhalterplatte-1, generate
    1,  1440,     1
*Elset, elset=_PickedSet13, internal, instance=Niederhalterplatte-1, generate
    1,  1020,     1
*Nset, nset=_PickedSet18, internal, instance=Blech-1, generate
  1,  22,   1
*Elset, elset=_PickedSet18, internal, instance=Blech-1, generate
  1,  10,   1
*Nset, nset=_PickedSet22, internal, instance=Niederhalterplatte-1, generate
    5,  1440,     5
*Elset, elset=_PickedSet22, internal, instance=Niederhalterplatte-1, generate
    4,  1020,     4
*Nset, nset=_PickedSet23, internal, instance=Niederhalterplatte-2, generate
    5,  1440,     5
*Elset, elset=_PickedSet23, internal, instance=Niederhalterplatte-2, generate
    4,  1020,     4
*Elset, elset=_NH-oben_S6, internal, instance=Niederhalterplatte-2, generate
    1,  1017,     4
*Surface, type=ELEMENT, name=NH-oben
_NH-oben_S6, S6
*Elset, elset=_NH-unten_S6, internal, instance=Niederhalterplatte-1, generate
    1,  1017,     4
*Surface, type=ELEMENT, name=NH-unten
_NH-unten_S6, S6
*Elset, elset=__PickedSurf14_S4, internal, instance=Niederhalterplatte-2, generate
    4,  1020,     4
*Surface, type=ELEMENT, name=_PickedSurf14, internal
__PickedSurf14_S4, S4
*End Assembly
*Amplitude, name=SmoothStep, definition=SMOOTH STEP
             0.,              0.,              1.,              1.
**
** MATERIALS
**
*Material, name=Stahl
*Density
 7.9e-09,
*Elastic
210000., 0.3
*Material, name=X5CRNI18-1_4301
*Conductivity
 13.79,
*Density
 7.9e-09,
*Elastic
200000., 0.3
*Expansion
 1.65e-05,
*Inelastic Heat Fraction
         0.9,
*Plastic
 311.,   0.
 362., 0.02
 408., 0.04
 451., 0.06
 491., 0.08
 528.,  0.1
 564., 0.12
 598., 0.14
 631., 0.16
 662., 0.18
 693.,  0.2
 832.,  0.3
 956.,  0.4
1070.,  0.5
1320., 0.75
1540.,   1.
*Specific Heat
 4.9331e+08,
**
** INTERACTION PROPERTIES
**
*Surface Interaction, name=CONTACT-ZR
*Friction, user=friction, depvar=0, properties=5
0.0623,-0.1542,-0.1192,0.1017,-0.0844
*Surface Behavior, pressure-overclosure=HARD
*Surface Interaction, name=COULOMB_0-137
*Friction, user, depvar=0, properties=5
 0.0623, -0.1542, -0.1192,  0.1017, -0.0844
*Surface Behavior, pressure-overclosure=HARD
**
** INTERACTIONS
**
** Interaction: general_contact
*Contact, op=NEW
*Contact Inclusions, ALL EXTERIOR
*Contact Property Assignment
 ,  , CONTACT-ZR
** ----------------------------------------------------------------
**
** STEP: Step-1
**
*Step, name=Step-1, nlgeom=YES
*Dynamic, Explicit
, 0.4092
*Bulk Viscosity
0.06, 1.2
*FIELD, USER, NUMBER=2
NH1_Set
** Mass Scaling: Semi-Automatic
**               Whole Model
*Fixed Mass Scaling, factor=4.
**
** BOUNDARY CONDITIONS
**
** Name: BC-1 Type: Symmetry/Antisymmetry/Encastre
*Boundary
_PickedSet22, ENCASTRE
** Name: BC-2 Type: Displacement/Rotation
*Boundary
_PickedSet23, 1, 1
_PickedSet23, 3, 3
_PickedSet23, 4, 4
_PickedSet23, 5, 5
_PickedSet23, 6, 6
** Name: BC-3 Type: Displacement/Rotation
*Boundary, amplitude=SmoothStep
_PickedSet18, 1, 1, 500.
_PickedSet18, 2, 2
_PickedSet18, 3, 3
_PickedSet18, 4, 4
_PickedSet18, 5, 5
_PickedSet18, 6, 6
**
** LOADS
**
** Name: Surfforce   Type: Pressure
*Dsload
_PickedSurf14, P, 3.
**
** INTERACTIONS
**
** Interaction: general_contact
*Contact, op=NEW
*Contact Inclusions, ALL EXTERIOR
*Contact Property Assignment
 ,  , CONTACT-ZR
NH-unten , Blech-1.Blech_unten , CONTACT-ZR
**
** OUTPUT REQUESTS
**
*Restart, write, number interval=1, time marks=NO
**
** FIELD OUTPUT: F-Output-3
**
*Output, field, number interval=100
*Contact Output
CSTRESS, FSLIP, FSLIPR
**
** FIELD OUTPUT: F-Output-2
**
*Element Output, directions=YES
FV, LE, P, PE, PEEQ, PEEQVAVG, PEVAVG, S, SDV, STH, SVAVG
**
** FIELD OUTPUT: F-Output-1
**
*Output, field, variable=PRESELECT, number interval=100
**
** HISTORY OUTPUT: H-Output-1
**
*Output, history, variable=PRESELECT
*End Step
